*Heading
** Two face-connected tetrahedra keep the material-region contract minimal.
*Node
1,0,0,0
2,1,0,0
3,0,1,0
4,0,0,1
5,1,1,1
*Nset, nset=FIXED
1,2,3,4,5
*Element, type=C3D4, elset=SOFT
1,1,2,3,4
*Element, type=C3D4, elset=STIFF
2,2,3,4,5
*Material, name=RUBBER
*Elastic
10.,0.3
*Density
1.0
*Material, name=STEEL
*Elastic
1000.,0.25
*Density
2.0
*Solid Section, elset=SOFT, material=RUBBER
*Solid Section, elset=STIFF, material=STEEL
*Step, name=HOLD
*Static
*Boundary
FIXED,1,3,0.
*End Step
